// Generated config.glm based on config/simulation_configuration.csv
#define WEATHER=CA-San_Jose_Intl_Ap.tmy3
#define STARTTIME="2020-01-01 00:00:00 PST"
#define STOPTIME="2020-03:30 00:00:00 PST"
#define BILLDUMPTIME=2020-03-28 00:00:00
#define TIMEZONE=PST+8PDT
#define TARIFF=fixed.tariff
