#define STARTTIME=${STARTTIME:-2020-01-01 00:00:00 PST}
#define STOPTIME=${STOPTIME:-2021-01-01 00:00:00 PST}
#define TIMEZONE=${TIMEZONE:-US/CA/Los Angeles}
#define WEATHER=${WEATHER:-CA-San_Jose_Intl_Ap.tmy3}
#define TARIFF=${TARIFF:-fixed.tariff}
